import Sofa
# import SofaRuntime
# import Sofa.Gui
# custom python controller
from Controller import ThreeInstrumentsController

def createScene(root):
    # Parameters:
    straight_length = [95.0, 115.0, 145.0] # [mm]
    curved_length = [30.0, 40.0, 55.0] # [mm]
    tube_radius = [0.85, 0.75, 0.65] # [mm]
    radius_curvature = [90.0, 100.0, 115.0] # [mm]

    # Root Node
    root.dt = 0.05
    root.gravity = (0, 0, 0)

    required_plugins = [
        "BeamAdapter",
        "Sofa.Component.Constraint.Projective",
        "Sofa.Component.LinearSolver.Direct",
        "Sofa.Component.Mapping.Linear",
        "Sofa.Component.ODESolver.Backward",
        "Sofa.Component.SolidMechanics.Spring",
        "Sofa.Component.StateContainer",
        "Sofa.Component.Topology.Container.Dynamic",
        "Sofa.Component.Topology.Container.Grid",
        "Sofa.Component.Topology.Mapping",
        "Sofa.Component.Visual",
        "Sofa.GL.Component.Rendering3D",
        "Sofa.Component.Constraint.Lagrangian", # added for terminal
        "Sofa.GL.Component.Shader",
    ]

    for plugin in required_plugins:
        root.addObject("RequiredPlugin", name=plugin)

    # Visual Style
    root.addObject('VisualStyle', displayFlags='showVisualModels ' \
                                    'showBehaviorModels ' \
                                    'showCollisionModels ' \
                                    'hideMappings ' \
                                    'hideForceFields')

    # Default Animation and Visual Loops
    root.addObject('DefaultAnimationLoop')
    root.addObject('DefaultVisualManagerLoop')

    root.addObject('GenericConstraintSolver',
               name='ConstraintSolver',
               computeConstraintForces="1",
               tolerance='1e-10',
               maxIterations='1000')


    #----> 1. Catheter
    # RodStraightSection and RodSpireSection for Catheter
    topoLines_cath = root.addChild('topoLines_cath')
    topoLines_cath.addObject('RodStraightSection',
                             name="CathStraightSection",
                             youngModulus=10000,
                             massDensity=0.00000155,
                             nbEdgesCollis=50,
                             nbEdgesVisu=300,
                             length=straight_length[0],
                             radius=tube_radius[0],
                             poissonRatio=0.3)

    topoLines_cath.addObject('RodSpireSection',
                             name="CathSpireSection",
                             youngModulus=10000,
                             massDensity=0.00000155,
                             nbEdgesCollis=10,
                             nbEdgesVisu=300,
                             length=curved_length[0],
                             spireDiameter=2*radius_curvature[0],
                             spireHeight=0.0,
                             radius=tube_radius[0],
                             poissonRatio=0.3)

    # WireRestShape for Catheter: condizione di riposo
    topoLines_cath.addObject('WireRestShape',
                             name='catheterRestShape',
                             template="Rigid3d",
                             wireMaterials="@CathStraightSection @CathSpireSection")

    # Mesh and Geometry for Catheter
    topoLines_cath.addObject('EdgeSetTopologyContainer', name='meshLinesCath')
    topoLines_cath.addObject('EdgeSetTopologyModifier', name='Modifier')
    topoLines_cath.addObject('EdgeSetGeometryAlgorithms', name='GeomAlgo', template='Rigid3d')
    topoLines_cath.addObject('MechanicalObject', name='dofTopo1', template='Rigid3d', position="0 0 0 0 0 0 1")
    # topoLines_cath.addObject('UniformMass', totalMass=0.1)

    #----> 2. Guidewire
    # RodStraightSection and RodSpireSection for Guidewire
    topo_lines_guide = root.addChild('topoLines_guide')
    topo_lines_guide.addObject('RodStraightSection',
                               name="GuideStraightSection",
                               youngModulus=10000,
                               massDensity=0.00000155,
                               nbEdgesCollis=50,
                               nbEdgesVisu=300,
                               length=straight_length[1],
                               radius=tube_radius[1],
                               poissonRatio=0.3)

    topo_lines_guide.addObject('RodSpireSection',
                               name="GuideSpireSection",
                               youngModulus=10000,
                               massDensity=0.00000155,
                               nbEdgesCollis=10,
                               nbEdgesVisu=300,
                               length=curved_length[1],
                               spireDiameter=2*radius_curvature[1],
                               spireHeight=0.0,
                               radius=tube_radius[1],
                               poissonRatio=0.3)

    # WireRestShape for Guidewire
    topo_lines_guide.addObject('WireRestShape',
                               name='GuideRestShape',
                               template="Rigid3d",
                               wireMaterials="@GuideStraightSection @GuideSpireSection")

    # Mesh and Geometry for Guidewire
    topo_lines_guide.addObject('EdgeSetTopologyContainer', name='meshLinesGuide')
    topo_lines_guide.addObject('EdgeSetTopologyModifier', name='Modifier')
    topo_lines_guide.addObject('EdgeSetGeometryAlgorithms', name='GeomAlgo', template='Rigid3d')
    topo_lines_guide.addObject('MechanicalObject', name='dofTopo2', template='Rigid3d', position="0 0 0 0 0 0 1")
    # topo_lines_guide.addObject('UniformMass', totalMass=0.1)

    #----> 3. Coils
    # RodStraightSection and RodSpireSection for Coils
    straight_section_coils = root.addChild('topoLines_coils')
    straight_section_coils.addObject('RodStraightSection',
                                     name="CoilStraightSection",
                                     youngModulus=168000,
                                     massDensity=0.000021,
                                     nbEdgesCollis=50,
                                     nbEdgesVisu=300,
                                     length=straight_length[2],
                                     radius=tube_radius[2],
                                     poissonRatio=0.3)

    straight_section_coils.addObject('RodSpireSection',
                                     name="CoilSpireSection",
                                     youngModulus=168000,
                                     massDensity=0.000021,
                                     nbEdgesCollis=10,
                                     nbEdgesVisu=300,
                                     length=curved_length[2],
                                     spireDiameter=2*radius_curvature[2],
                                     spireHeight=0.0,
                                     radius=tube_radius[2],
                                     poissonRatio=0.3)

    # WireRestShape for Coils
    straight_section_coils.addObject('WireRestShape',
                                     name='CoilRestShape',
                                     template="Rigid3d",
                                     wireMaterials="@CoilStraightSection @CoilSpireSection")

    # Mesh and Geometry for Coils
    straight_section_coils.addObject('EdgeSetTopologyContainer', name='meshLinesCoils')
    straight_section_coils.addObject('EdgeSetTopologyModifier', name='Modifier')
    straight_section_coils.addObject('EdgeSetGeometryAlgorithms', name='GeomAlgo', template='Rigid3d')
    straight_section_coils.addObject('MechanicalObject', name='dofTopo3', template='Rigid3d', position="0 0 0 0 0 0 1")
    # straight_section_coils.addObject('UniformMass', totalMass=0.1)

    # RefStartingPos = root.addChild('RefStartingPos')
    # RefStartingPos.addObject('MechanicalObject', name="ReferencePos", template="Rigid3d", position="-3 1.5 0.3  1 0 0 0")

    # ----> 4. Combine the 3 instruments
    instrument_combined = root.addChild("InstrumentCombined")
    instrument_combined.addObject('EulerImplicitSolver',
                                  rayleighStiffness=0.2,
                                  rayleighMass=0.03,
                                  printLog=False)
    instrument_combined.addObject('BTDLinearSolver')
    instrument_combined.addObject('RegularGridTopology',
                                  name='meshLinesCombined',
                                  nx=181, ny=1, nz=1)
    instrument_combined.addObject('MechanicalObject',
                                  template='Rigid3d',
                                  name='DOFs')

    # Wire Interpolation and Force Fields
    instrument_combined.addObject("InterventionalRadiologyController",
               template="Rigid3d",
               name="IRController",
               printLog="0",
               xtip="0 0 0",
               step="1",
               rotationInstrument="0 0 0",
               controlledInstrument="0",
               startingPos="0 0 0 0 0 0 1",
               speed="0",
               instruments="InterpolCatheter InterpolGuide InterpolCoils")

    instrument_combined.addObject('WireBeamInterpolation',
                                  name="InterpolCatheter",
                                  WireRestShape="@../topoLines_cath/catheterRestShape",
                                  printLog=False)
    instrument_combined.addObject('AdaptiveBeamForceFieldAndMass',
                                  name="CatheterForceField",
                                  interpolation="@InterpolCatheter",
                                  printLog=False)

    instrument_combined.addObject('WireBeamInterpolation',
                                  name="InterpolGuide",
                                  WireRestShape="@../topoLines_guide/GuideRestShape",
                                  printLog=False)
    instrument_combined.addObject('AdaptiveBeamForceFieldAndMass',
                                  name="GuideForceField",
                                  interpolation="@InterpolGuide",
                                  printLog=False)

    instrument_combined.addObject('WireBeamInterpolation',
                                  name="InterpolCoils",
                                  WireRestShape="@../topoLines_coils/CoilRestShape",
                                  printLog=False)
    instrument_combined.addObject('AdaptiveBeamForceFieldAndMass',
                                  name="CoilsForceField",
                                  interpolation="@InterpolCoils",
                                  printLog=False)


    instrument_combined.addObject('LinearSolverConstraintCorrection', printLog=False, wire_optimization="true")

    # Aggiunta del controller
    instrument_combined.addObject(ThreeInstrumentsController(instrument_combined.IRController))

    # Simulazione tempi vs azioni
    # instrument_combined.addObject("BeamAdapterActionController",
    #            name="AController",
    #            interventionController="@IRController",
    #            writeMode="0",
    #            timeSteps="9.1 17.1 17.55 18.05 18.6 19.05 19.55 20.05 20.5 21 21.45 21.9 22.65 23.1 23.55 24.05 24.55 25 25.45 25.95 26.4 27.1 27.55 28.05 28.55 29 29.5 29.95 30.4 30.9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",
    #            actions="1 1 1 1 1 1 1 1 1 1 1 1 1 1 1 1 1 1 1 1 1 1 1 1 1 1 1 1 1 1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")

    # Fissa il primo nodo dell'assieme
    instrument_combined.addObject("FixedProjectiveConstraint",
               name="FixedConstraint",
               indices="0")
    # queste molle mantengono fermo l'estremo iniziale degli strumenti. Questo evita che i tubi vadano via o "scorrano" se non si vuole
    instrument_combined.addObject("RestShapeSpringsForceField",
               points="@IRController.indexFirstNode",
               stiffness="1e8",
               angularStiffness="1e8")


    # VISUALIZATION NODES
    # ------------------- Catheter Visu ------------------------
    visuCath = instrument_combined.addChild("VisuCatheter")
    visuCath.addObject("MechanicalObject", name="Quads")
    visuCath.addObject("QuadSetTopologyContainer", name="ContainerCath")
    visuCath.addObject("QuadSetTopologyModifier", name="Modifier")
    visuCath.addObject("QuadSetGeometryAlgorithms",
                       name="GeomAlgo", template="Vec3d")
    visuCath.addObject("Edge2QuadTopologicalMapping",
                       nbPointsOnEachCircle=10, radius=tube_radius[0],
                       input="@../../topoLines_cath/meshLinesCath",
                       output="@ContainerCath", flipNormals=True, printLog=False)
    visuCath.addObject("AdaptiveBeamMapping",
                       name="VisuMapCath",
                       useCurvAbs=True, printLog=False,
                       interpolation="@../InterpolCatheter",
                       isMechanical=False)
    cathGL = visuCath.addChild("VisuOgl")
    cathGL.addObject("OglModel", name="Visual",
                     color="0 1 1", #1 0 0
                     scale3d="1.0 1.0 1.0")
    cathGL.addObject("IdentityMapping",
                     input="@../Quads", output="@Visual")
    # ------------------- Guide Visu ------------------------
    visuGuide = instrument_combined.addChild("VisuGuide")
    visuGuide.addObject("MechanicalObject", name="Quads")
    visuGuide.addObject("QuadSetTopologyContainer", name="ContainerGuide")
    visuGuide.addObject("QuadSetTopologyModifier", name="Modifier")
    visuGuide.addObject("QuadSetGeometryAlgorithms",
                        name="GeomAlgo", template="Vec3d")
    visuGuide.addObject("Edge2QuadTopologicalMapping",
                        nbPointsOnEachCircle=10, radius=tube_radius[1],
                        input="@../../topoLines_guide/meshLinesGuide",
                        output="@ContainerGuide", flipNormals=True, printLog=False)
    visuGuide.addObject("AdaptiveBeamMapping",
                        name="visuMapGuide",
                        useCurvAbs=True, printLog=False,
                        interpolation="@../InterpolGuide",
                        isMechanical=False)
    guideGL = visuGuide.addChild("VisuOgl")
    guideGL.addObject("OglModel", name="Visual",
                      color="1 1 0", # 0 1 0
                      scale3d="0.9 0.9 0.9")
    guideGL.addObject("IdentityMapping",
                      input="@../Quads", output="@Visual")
    # ------------------- Coils Visu ------------------------
    visuCoils = instrument_combined.addChild("VisuCoils")
    visuCoils.addObject("MechanicalObject", name="Quads")
    visuCoils.addObject("QuadSetTopologyContainer", name="ContainerCoils")
    visuCoils.addObject("QuadSetTopologyModifier", name="Modifier")
    visuCoils.addObject("QuadSetGeometryAlgorithms",
                        name="GeomAlgo", template="Vec3d")
    visuCoils.addObject("Edge2QuadTopologicalMapping",
                        nbPointsOnEachCircle=10, radius=tube_radius[2],
                        input="@../../topoLines_coils/meshLinesCoils",
                        output="@ContainerCoils",
                        flipNormals=True, printLog=False)
    visuCoils.addObject("AdaptiveBeamMapping",
                        name="visuMapCoils",
                        useCurvAbs=True, printLog=False,
                        interpolation="@../InterpolCoils",
                        isMechanical=False)
    coilsGL = visuCoils.addChild("VisuOgl")
    coilsGL.addObject("OglModel", name="Visual",
                      color="0 0 1",
                      scale3d="0.8 0.8 0.8")
    coilsGL.addObject("IdentityMapping",
                      input="@../Quads", output="@Visual")


    # Directional Light
    root.addObject('LightManager')
    light = root.addChild("light")
    light.addObject('DirectionalLight', name="dirLight", direction=[0, 1, 0])

    # Return the root node
    return root


# def main(): # non mostra la gui di SOFA se eseguito da terminale
#     root = Sofa.Core.Node("root")
#     createScene(root)
#     Sofa.Simulation.init(root)

#     Sofa.Gui.GUIManager.Init('myscene', 'qglviewer')
#     Sofa.Gui.GUIManager.createGUI(root, __file__)
#     Sofa.Gui.GUIManager.SetDimension(1080, 1080)
#     Sofa.Gui.GUIManager.MainLoop(root)
#     Sofa.Gui.GUIManager.closeGUI()


# Per eseguirlo via python3 3instruments.py aggiungi le seguenti:
# import subprocess
# import os

# def main():
#     scene_file = "/home/emanuele/SOFA/v25.06.00/Techical project/3instruments.py"

#     # fai partire runSofa esattamente con la tua scena Python
#     subprocess.run(["runSofa", scene_file])

# if __name__ == "__main__":
#     main()
