import Sofa
import Sofa.Core
import Sofa.Simulation

# Definizione della funzione principale richiesta da SOFA
def createScene(rootNode):

    # <Node name='root' dt='0.05' gravity='0 0 0'>
    rootNode.dt.value = 0.05
    rootNode.gravity.value = [0, 0, 0]

    # --- Plugins (RequiredPlugin) ---
    # In Python, i plugin vengono caricati con Sofa.Component.load.
    # Spesso SOFA li carica automaticamente se i componenti sono usati,
    # ma è buona pratica includerli, o caricarli nella configurazione di avvio.
    # Qui li carichiamo esplicitamente per rispecchiare l'XML.
    rootNode.createObject('RequiredPlugin', name='BeamAdapter')
    rootNode.createObject('RequiredPlugin', name='Sofa.Component.Constraint.Projective')
    rootNode.createObject('RequiredPlugin', name='Sofa.Component.LinearSolver.Direct')
    rootNode.createObject('RequiredPlugin', name='Sofa.Component.Mapping.Linear')
    rootNode.createObject('RequiredPlugin', name='Sofa.Component.ODESolver.Backward')
    rootNode.createObject('RequiredPlugin', name='Sofa.Component.SolidMechanics.Spring')
    rootNode.createObject('RequiredPlugin', name='Sofa.Component.StateContainer')
    rootNode.createObject('RequiredPlugin', name='Sofa.Component.Topology.Container.Dynamic')
    rootNode.createObject('RequiredPlugin', name='Sofa.Component.Topology.Container.Grid')
    rootNode.createObject('RequiredPlugin', name='Sofa.Component.Topology.Mapping')
    rootNode.createObject('RequiredPlugin', name='Sofa.Component.Visual')
    rootNode.createObject('RequiredPlugin', name='Sofa.GL.Component.Rendering3D')

    # <VisualStyle .../>
    rootNode.createObject('VisualStyle',
                          displayFlags='showVisualModels showBehaviorModels showCollisionModels hideMappings hideForceFields')

    # <DefaultAnimationLoop />
    rootNode.createObject('DefaultAnimationLoop')
    # <DefaultVisualManagerLoop/>
    rootNode.createObject('DefaultVisualManagerLoop')

    # ----------------------------------------------------
    # INTERVENTIONAL RADIOLOGY INSTRUMENTS (catheter, guidewire, coil)
    # ----------------------------------------------------

    # --- Node 'topoLines_cath' ---
    topoLines_cath = rootNode.createChild('topoLines_cath')
    # <RodStraightSection .../>
    topoLines_cath.createObject('RodStraightSection', name="StraightSection", youngModulus="10000", massDensity='0.00000155',
                                nbBeams="40", nbEdgesCollis="40", nbEdgesVisu="120", length="95.0", radius='0.85')
    # <RodSpireSection .../>
    topoLines_cath.createObject('RodSpireSection', name="SpireSection", youngModulus="10000", massDensity='0.00000155',
                                nbBeams="20", nbEdgesCollis="20", nbEdgesVisu="80", length="30.0",
                                spireDiameter="180.0", spireHeight="0.0", radius='0.85')
    # <WireRestShape .../>
    topoLines_cath.createObject('WireRestShape', template="Rigid3d", name="catheterRestShape",
                                wireMaterials='@StraightSection @SpireSection')
    # <EdgeSetTopologyContainer .../>
    topoLines_cath.createObject('EdgeSetTopologyContainer', name='meshLinesCath')
    # <EdgeSetTopologyModifier .../>
    topoLines_cath.createObject('EdgeSetTopologyModifier', name='Modifier')
    # <EdgeSetGeometryAlgorithms .../>
    topoLines_cath.createObject('EdgeSetGeometryAlgorithms', name='GeomAlgo', template='Rigid3d')
    # <MechanicalObject .../>
    topoLines_cath.createObject('MechanicalObject', template='Rigid3d', name='dofTopo1')

    # --- Node 'topoLines_guide' ---
    topoLines_guide = rootNode.createChild('topoLines_guide')
    # (Componenti simili a topoLines_cath, con parametri diversi)
    topoLines_guide.createObject('RodStraightSection', name="StraightSection", youngModulus="10000", massDensity='0.00000155',
                                 nbBeams="50", nbEdgesCollis="50", nbEdgesVisu="196", length="115.0", radius='0.75')
    topoLines_guide.createObject('RodSpireSection', name="SpireSection", youngModulus="10000", massDensity='0.00000155',
                                 nbBeams="10", nbEdgesCollis="10", nbEdgesVisu="4", length="40.0",
                                 spireDiameter="200", spireHeight="0.0", radius='0.75')
    topoLines_guide.createObject('WireRestShape', template="Rigid3d", name="GuideRestShape",
                                 wireMaterials='@StraightSection @SpireSection')
    topoLines_guide.createObject('EdgeSetTopologyContainer', name='meshLinesGuide')
    topoLines_guide.createObject('EdgeSetTopologyModifier', name='Modifier')
    topoLines_guide.createObject('EdgeSetGeometryAlgorithms', name='GeomAlgo', template='Rigid3d')
    topoLines_guide.createObject('MechanicalObject', template='Rigid3d', name='dofTopo2')

    # --- Node 'topoLines_coils' ---
    topoLines_coils = rootNode.createChild('topoLines_coils')
    # (Componenti simili a topoLines_cath, con parametri diversi)
    topoLines_coils.createObject('RodStraightSection', name="StraightSection", youngModulus="168000", massDensity='0.000021',
                                 nbBeams="30", nbEdgesCollis="30", nbEdgesVisu="360", length="145.0", radius='0.65')
    topoLines_coils.createObject('RodSpireSection', name="SpireSection", youngModulus="168000", massDensity='0.000021',
                                 nbBeams="30", nbEdgesCollis="30", nbEdgesVisu="40", length="55.0",
                                 spireDiameter="230", spireHeight="5.0", radius='0.65')
    topoLines_coils.createObject('WireRestShape', template="Rigid3d", name="CoilRestShape",
                                 wireMaterials='@StraightSection @SpireSection')
    topoLines_coils.createObject('EdgeSetTopologyContainer', name='meshLinesCoils')
    topoLines_coils.createObject('EdgeSetTopologyModifier', name='Modifier')
    topoLines_coils.createObject('EdgeSetGeometryAlgorithms', name='GeomAlgo', template='Rigid3d')
    topoLines_coils.createObject('MechanicalObject', template='Rigid3d', name='dofTopo3')

    # --- Node 'InstrumentCombined' ---
    InstrumentCombined = rootNode.createChild('InstrumentCombined')

    # <EulerImplicitSolver .../>
    InstrumentCombined.createObject('EulerImplicitSolver', rayleighStiffness='0.2', rayleighMass='0.1', printLog='false')
    # <BTDLinearSolver .../>
    InstrumentCombined.createObject('BTDLinearSolver', subpartSolve='0', verification='0', verbose='0')

    # <RegularGridTopology .../>
    InstrumentCombined.createObject('RegularGridTopology', name='meshLinesCombined',
                                    nx='181', ny='1', nz='1',
                                    xmin='0.0', xmax='1.0',
                                    ymin='0', ymax='0',
                                    zmin='1', zmax='1')
    # <MechanicalObject .../>
    InstrumentCombined.createObject('MechanicalObject', template='Rigid3d', name='DOFs', showIndices='0', ry='-90')

    # Interpolations e ForceFields
    # <WireBeamInterpolation .../>
    InstrumentCombined.createObject('WireBeamInterpolation', name='InterpolCatheter',
                                    WireRestShape='@../topoLines_cath/catheterRestShape')
    # <AdaptiveBeamForceFieldAndMass .../>
    InstrumentCombined.createObject('AdaptiveBeamForceFieldAndMass', name='CatheterForceField',
                                    interpolation='@InterpolCatheter')

    InstrumentCombined.createObject('WireBeamInterpolation', name='InterpolGuide',
                                    WireRestShape='@../topoLines_guide/GuideRestShape')
    InstrumentCombined.createObject('AdaptiveBeamForceFieldAndMass', name='GuideForceField',
                                    interpolation='@InterpolGuide')

    InstrumentCombined.createObject('WireBeamInterpolation', name='InterpolCoils',
                                    WireRestShape='@../topoLines_coils/CoilRestShape')
    InstrumentCombined.createObject('AdaptiveBeamForceFieldAndMass', name='CoilsForceField',
                                    interpolation='@InterpolCoils')

    # Controller
    # Nota: Le liste lunghe di parametri come 'timeSteps' e 'actions' devono essere inserite come una stringa Python.
    timeSteps_str = '9.1 17.1 17.55 18.05 18.6 19.05 19.55 20.05 20.5 21 21.45 21.9 22.65 23.1 23.55 24.05 24.55 25 25.45 25.95 26.4 27.1 27.55 28.05 28.55 29 29.5 29.95 30.4 30.9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'
    actions_str = '1 1 1 1 1 1 1 1 1 1 1 1 1 1 1 1 1 1 1 1 1 1 1 1 1 1 1 1 1 1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'

    # <BeamAdapterActionController .../>
    InstrumentCombined.createObject('BeamAdapterActionController', name="AController", interventionController="@IRController",
                                    writeMode="0", timeSteps=timeSteps_str, actions=actions_str)

    # <InterventionalRadiologyController .../>
    InstrumentCombined.createObject('InterventionalRadiologyController', template='Rigid3d', name='IRController',
                                    printLog='0', xtip='1 0 0', step='3', rotationInstrument='0 0 0',
                                    controlledInstrument='0', startingPos='0 0 0 0 -0.7071068 0 0.7071068',
                                    speed='2', instruments='InterpolCatheter InterpolGuide InterpolCoils')

    # <FixedProjectiveConstraint .../>
    InstrumentCombined.createObject('FixedProjectiveConstraint', name='FixedConstraint', indices='0')
    # <RestShapeSpringsForceField .../>
    InstrumentCombined.createObject('RestShapeSpringsForceField', points='@IRController.indexFirstNode',
                                    stiffness='1e8', angularStiffness='1e8')

    # --- Node 'VisuCatheter' (Sotto InstrumentCombined) ---
    VisuCatheter = InstrumentCombined.createChild('VisuCatheter')
    VisuCatheter.activated = True
    # Components VisuCatheter
    VisuCatheter.createObject('MechanicalObject', name='Quads')
    VisuCatheter.createObject('QuadSetTopologyContainer', name='ContainerCath')
    VisuCatheter.createObject('QuadSetTopologyModifier', name='Modifier')
    VisuCatheter.createObject('QuadSetGeometryAlgorithms', name='GeomAlgo', template='Vec3d')
    # <Edge2QuadTopologicalMapping .../>
    VisuCatheter.createObject('Edge2QuadTopologicalMapping', nbPointsOnEachCircle='10', radius='2',
                              input='@../../topoLines_cath/meshLinesCath', output='@ContainerCath', flipNormals='true')
    # <AdaptiveBeamMapping .../>
    VisuCatheter.createObject('AdaptiveBeamMapping', name='VisuMapCath', useCurvAbs='1', printLog='0',
                              interpolation='@../InterpolCatheter', input='@../DOFs', output='@Quads', isMechanical='false')

    # --- Node 'VisuOgl' (Sotto VisuCatheter) ---
    VisuOgl_cath = VisuCatheter.createChild('VisuOgl')
    VisuOgl_cath.activated = True
    # <OglModel .../>
    VisuOgl_cath.createObject('OglModel', name='Visual', color='0.7 0.7 0.7', quads='@../ContainerCath.quads',
                              material='texture Ambient 1 0.2 0.2 0.2 0.0 Diffuse 1 1.0 1.0 1.0 1.0 Specular 1 1.0 1.0 1.0 1.0 Emissive 0 0.15 0.05 0.05 0.0 Shininess 1 20')
    # <IdentityMapping .../>
    VisuOgl_cath.createObject('IdentityMapping', input='@../Quads', output='@Visual')

    # --- Node 'VisuGuide' (Sotto InstrumentCombined) ---
    VisuGuide = InstrumentCombined.createChild('VisuGuide')
    VisuGuide.activated = True
    # Components VisuGuide
    VisuGuide.createObject('MechanicalObject', name='Quads')
    VisuGuide.createObject('QuadSetTopologyContainer', name='ContainerGuide')
    VisuGuide.createObject('QuadSetTopologyModifier', name='Modifier')
    VisuGuide.createObject('QuadSetGeometryAlgorithms', name='GeomAlgo', template='Vec3d')
    # <Edge2QuadTopologicalMapping .../>
    VisuGuide.createObject('Edge2QuadTopologicalMapping', nbPointsOnEachCircle='10', radius='1',
                           input='@../../topoLines_guide/meshLinesGuide', output='@ContainerGuide', flipNormals='true', listening='true')
    # <AdaptiveBeamMapping .../>
    VisuGuide.createObject('AdaptiveBeamMapping', name='visuMapGuide', useCurvAbs='1', printLog='0',
                           interpolation='@../InterpolGuide', input='@../DOFs', output='@Quads', isMechanical='false')

    # --- Node 'VisuOgl' (Sotto VisuGuide) ---
    VisuOgl_guide = VisuGuide.createChild('VisuOgl')
    # <OglModel .../>
    VisuOgl_guide.createObject('OglModel', name='Visual', color='0.2 0.2 0.8',
                               material='texture Ambient 1 0.2 0.2 0.2 0.0 Diffuse 1 1.0 1.0 1.0 1.0 Specular 1 1.0 1.0 1.0 1.0 Emissive 0 0.15 0.05 0.05 0.0 Shininess 1 20', quads='@../ContainerGuide.quads')
    # <IdentityMapping .../>
    VisuOgl_guide.createObject('IdentityMapping', input='@../Quads', output='@Visual')

    # --- Node 'VisuCoils' (Sotto InstrumentCombined) ---
    VisuCoils = InstrumentCombined.createChild('VisuCoils')
    VisuCoils.activated = True
    # Components VisuCoils
    VisuCoils.createObject('MechanicalObject', name='Quads')
    VisuCoils.createObject('QuadSetTopologyContainer', name='ContainerCoils')
    VisuCoils.createObject('QuadSetTopologyModifier', name='Modifier')
    VisuCoils.createObject('QuadSetGeometryAlgorithms', name='GeomAlgo', template='Vec3d')
    # <Edge2QuadTopologicalMapping .../>
    VisuCoils.createObject('Edge2QuadTopologicalMapping', nbPointsOnEachCircle='10', radius='0.3',
                           input='@../../topoLines_coils/meshLinesCoils', output='@ContainerCoils', flipNormals='true', listening='true')
    # <AdaptiveBeamMapping .../>
    VisuCoils.createObject('AdaptiveBeamMapping', name='visuMapCoils', useCurvAbs='1', printLog='0',
                           interpolation='@../InterpolCoils', input='@../DOFs', output='@Quads', isMechanical='false')

    # --- Node 'VisuOgl' (Sotto VisuCoils) ---
    VisuOgl_coils = VisuCoils.createChild('VisuOgl')
    # <OglModel .../>
    VisuOgl_coils.createObject('OglModel', name='Visual', color='0.2 0.8 0.2',
                               material='texture Ambient 1 0.2 0.2 0.2 0.0 Diffuse 1 1.0 1.0 1.0 1.0 Specular 1 1.0 1.0 1.0 1.0 Emissive 0 0.15 0.05 0.05 0.0 Shininess 1 20', quads='@../ContainerCoils.quads')
    # <IdentityMapping .../>
    VisuOgl_coils.createObject('IdentityMapping', input='@../Quads', output='@Visual')

    return rootNode
